@Author Reine Fares;
@Date Mars 2022;
@Description{ Teste de cisaillement modele de Iwan };

@MaximumNumberOfSubSteps 1;
@ModellingHypothesis 'Tridimensional';
@Behaviour<generic> 'src/libBehaviour.so' 'Iwan';

@ExternalStateVariable 'Temperature' 293.15;
@MaterialProperty<constant> 'YoungModulus' 614930000.0;
@MaterialProperty<constant> 'PoissonRatio' 0.371;
@MaterialProperty<constant> 'NumberofSpring' 34 ;

@MaterialProperty<constant>	'BackSCoeffCi[0]'	1.45281258E+10	;
@MaterialProperty<constant>	'BackSCoeffCi[1]'	5.82178617E+10	;
@MaterialProperty<constant>	'BackSCoeffCi[2]'	4.54355646E+10	;
@MaterialProperty<constant>	'BackSCoeffCi[3]'	3.70904898E+10	;
@MaterialProperty<constant>	'BackSCoeffCi[4]'	2.77751572E+10	;
@MaterialProperty<constant>	'BackSCoeffCi[5]'	2.15706482E+10	;
@MaterialProperty<constant>	'BackSCoeffCi[6]'	1.53920096E+10	;
@MaterialProperty<constant>	'BackSCoeffCi[7]'	1.23928163E+10	;
@MaterialProperty<constant>	'BackSCoeffCi[8]'	1.00167542E+10	;
@MaterialProperty<constant>	'BackSCoeffCi[9]'	7.88712681E+09	;
@MaterialProperty<constant>	'BackSCoeffCi[10]'	6.17841185E+09	;
@MaterialProperty<constant>	'BackSCoeffCi[11]'	5.25405456E+09	;
@MaterialProperty<constant>	'BackSCoeffCi[12]'	4.27446331E+09	;
@MaterialProperty<constant>	'BackSCoeffCi[13]'	4.01462717E+09	;
@MaterialProperty<constant>	'BackSCoeffCi[14]'	4.28497533E+09	;
@MaterialProperty<constant>	'BackSCoeffCi[15]'	3.47094829E+09	;
@MaterialProperty<constant>	'BackSCoeffCi[16]'	2.39276478E+09	;
@MaterialProperty<constant>	'BackSCoeffCi[17]'	1.81963534E+09	;
@MaterialProperty<constant>	'BackSCoeffCi[18]'	1.42613657E+09	;
@MaterialProperty<constant>	'BackSCoeffCi[19]'	1.08674829E+09	;
@MaterialProperty<constant>	'BackSCoeffCi[20]'	8.65896849E+08	;
@MaterialProperty<constant>	'BackSCoeffCi[21]'	7.59030876E+08	;
@MaterialProperty<constant>	'BackSCoeffCi[22]'	5.12631105E+08	;
@MaterialProperty<constant>	'BackSCoeffCi[23]'	3.82296058E+08	;
@MaterialProperty<constant>	'BackSCoeffCi[24]'	2.91042980E+08	;
@MaterialProperty<constant>	'BackSCoeffCi[25]'	1.35494636E+08	;
@MaterialProperty<constant>	'BackSCoeffCi[26]'	9.52184677E+07	;
@MaterialProperty<constant>	'BackSCoeffCi[27]'	1.03105902E+08	;
@MaterialProperty<constant>	'BackSCoeffCi[28]'	7.05953646E+07	;
@MaterialProperty<constant>	'BackSCoeffCi[29]'	4.13915375E+07	;
@MaterialProperty<constant>	'BackSCoeffCi[30]'	2.51757271E+07	;
@MaterialProperty<constant>	'BackSCoeffCi[31]'	1.47582922E+07	;
@MaterialProperty<constant>	'BackSCoeffCi[32]'	8.87052676E+06	;
@MaterialProperty<constant>	'BackSCoeffCi[33]'	5.95328485E+06	;


@MaterialProperty<constant>	'VMSYi[0]'	3.40005509E+05	;
@MaterialProperty<constant>	'VMSYi[1]'	4.20308513E+05	;
@MaterialProperty<constant>	'VMSYi[2]'	5.24405583E+05	;
@MaterialProperty<constant>	'VMSYi[3]'	6.53604724E+05	;
@MaterialProperty<constant>	'VMSYi[4]'	8.05746026E+05	;
@MaterialProperty<constant>	'VMSYi[5]'	1.02172957E+06	;
@MaterialProperty<constant>	'VMSYi[6]'	1.26789373E+06	;
@MaterialProperty<constant>	'VMSYi[7]'	1.64705367E+06	;
@MaterialProperty<constant>	'VMSYi[8]'	2.01271770E+06	;
@MaterialProperty<constant>	'VMSYi[9]'	2.52032780E+06	;
@MaterialProperty<constant>	'VMSYi[10]'	3.05546227E+06	;
@MaterialProperty<constant>	'VMSYi[11]'	3.75162146E+06	;
@MaterialProperty<constant>	'VMSYi[12]'	4.38436606E+06	;
@MaterialProperty<constant>	'VMSYi[13]'	5.22502629E+06	;
@MaterialProperty<constant>	'VMSYi[14]'	5.80307354E+06	;
@MaterialProperty<constant>	'VMSYi[15]'	6.42397205E+06	;
@MaterialProperty<constant>	'VMSYi[16]'	7.14120247E+06	;
@MaterialProperty<constant>	'VMSYi[17]'	8.13198230E+06	;
@MaterialProperty<constant>	'VMSYi[18]'	9.07056705E+06	;
@MaterialProperty<constant>	'VMSYi[19]'	1.01794843E+07	;
@MaterialProperty<constant>	'VMSYi[20]'	1.12643332E+07	;
@MaterialProperty<constant>	'VMSYi[21]'	1.23695744E+07	;
@MaterialProperty<constant>	'VMSYi[22]'	1.32516915E+07	;
@MaterialProperty<constant>	'VMSYi[23]'	1.46063819E+07	;
@MaterialProperty<constant>	'VMSYi[24]'	1.55155396E+07	;
@MaterialProperty<constant>	'VMSYi[25]'	1.67173705E+07	;
@MaterialProperty<constant>	'VMSYi[26]'	1.84181142E+07	;
@MaterialProperty<constant>	'VMSYi[27]'	1.92532768E+07	;
@MaterialProperty<constant>	'VMSYi[28]'	1.98852369E+07	;
@MaterialProperty<constant>	'VMSYi[29]'	2.06809022E+07	;
@MaterialProperty<constant>	'VMSYi[30]'	2.14289929E+07	;
@MaterialProperty<constant>	'VMSYi[31]'	2.21412448E+07	;
@MaterialProperty<constant>	'VMSYi[32]'	2.27687421E+07	;
@MaterialProperty<constant>	'VMSYi[33]'	2.32772260E+07	;


@ImposedStrain<data> 'EXY' './data/input.data' using 1:'$2/sqrt(2.)' ;
@Times<data> './data/input.data' using 1 ;
